// COMSOL Multiphysics 6.3.0.290 model "Bingham_DamBreak_2D_LevelSet.mph"
// Outline of the model tree

Parameters
  L = 1[m]
  H = 0.5[m]
  a = 0.2[m]
  h0 = 0.4[m]
  rhoB = 1200[kg/m^3]
  mup = 0.1[Pa*s]
  tauy = 20[Pa]
  mp = 10[s]
  rhoAir = 1.2[kg/m^3]
  muAir = 1.8e-5[Pa*s]

Variables
  var1 "Variables 1" on domains 1
    shear_stress = spf.mu*spf.sr
    yield_index = shear_stress/tauy

Geometry
  geom1 "Geometry 1" (2D, length unit m)
    r1: Rectangle | size = {L, H}
    r2: Rectangle | size = {a, h0}
    uni1: Union | input = r2
    fin: Finalize "Form Union"

Physics
  spf: LaminarFlow on all domains
    dependent variable u = {u, v, w}
    PhysicalModelProperty.IncludeGravity = 1
    fp1: FluidProperties (default)
    init1: init "Initial Values 1" (default)
    wallbc1: WallBC "Wall 1" (default)
    grav1: Gravity
    prpc1: PressurePointConstraint on points 7 | CompensateForHydrostaticPressure = 0
  ls: LevelSet on all domains
    dependent variable phils
    lsm1: LevelSetModel (default) | gamma = 2
    init1: init "Initial Values, Fluid 1 — Bingham" (default)
    initfluid2: initFluid2 "Initial Values, Fluid 2 — Air" on domains 2 | InitialValuesOption = SpecifyPhase
    nf1: NoFlow (default)

Multiphysics
  tpf1: TwoPhaseFlowLevelSet on all domains
    Constitutiverelation1 = InelasticNonNewtonian
    rho1_mat = userdef
    rho1 = rhoB
    nonNewtonianModels1 = BinghamP
    m_p1 = mp
    mu_p1_mat = userdef
    mu_p1 = mup
    tau_y1_mat = userdef
    tau_y1 = tauy
    Fluid2 = dommat
    rho2_mat = userdef
    rho2 = rhoAir
    mu2_mat = userdef
    mu2 = muAir
    IncludeSurfaceTension = 0
    Fluid_physics = spf
    Mathematics_physics = ls
  ww1: WettedWall on all boundaries | thetaw = 90[deg]; Fluid_physics = spf; Mathematics_physics = ls

Mesh
  mesh1 "Mesh 1"
    size: MeshSizeDefault | hmax = 0.01; custom = on
    map1: Map "Mapped 1" on remaining entities

Studies
  std1 "Study 1"
    param: Parametric "Parametric Sweep"
      pname = {tauy, mup}
      plistarr = {0 5 10 20, 0.05 0.1 0.2 0.3}
      punit = {Pa, Pa*s}
    phasei: PhaseInitialization | ftplistmethod = manual; solve for = {ls}
    time: Transient "Time Dependent"
      tlist = range(0,0.01,1.5)
      initialtime = 0
      ftplistmethod = manual
      useinitsol = on
      initstudy = std1
      notsolmethod = sol
      notstudy = std1

Solver configurations
  sol1 "Solution 1" (study std1)
    v1: Variables "Dependent Variables 1"
    s1: Stationary "Stationary Solver 1"
      fc1: FullyCoupled
      d1: Direct "Direct, interface distance (ls)"
    su1: StoreSolution "Solution Store 1"
    v2: Variables "Dependent Variables 2"
    t1: Time "Time-Dependent Solver 1"
      se1: Segregated
        ss1: SegregatedStep "Velocity u, Pressure p"
        ss2: SegregatedStep "Level Set Variable, Phils"
      d1: Direct "Direct, fluid flow variables (spf)"
      d2: Direct "Direct, level set variable (ls)"
  sol3 "Parametric Solutions 1" (study std1)
  sol2 "Solution Store 1" (study std1)

Datasets
  dset1: Solution | solution = sol1
  dset2: Solution | solution = sol2
  cln1: CutLine2D | data = dset1; genpoints = {{0, 0.005}, {1, 0.005}}
  dset3: Solution | solution = sol3

Derived values
  max1: MaxSurface "Surface Maximum 1" on domains 1 | data = dset1; table = tbl1; expr = spf.U
  max2: MaxLine "Line Maximum 2" on boundaries 7, 8 | data = dset1; table = tbl2; expr = p; unit = Pa; descr = Pressure
  int1: IntSurface "Bingham fluid area" on all domains | data = dset1; table = tbl3; expr = ls.Vf1

Tables
  tbl1: Table
    // Surface Maximum 1
    Time (s) | Velocity magnitude (m/s)
    0 | 0.000614959
    0.01 | 0.181044
    0.02 | 0.346837
    0.03 | 0.492659
    0.04 | 0.617388
    0.05 | 0.719275
    0.06 | 0.805571
    0.07 | 0.875168
    0.08 | 0.932694
    0.09 | 0.980736
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  tbl2: Table
    // Line Maximum 2
    Time (s) | Pressure (Pa)
    0 | 255.867
    0.01 | 288.02
    0.02 | 345.165
    0.03 | 436.407
    0.04 | 563.944
    0.05 | 721.749
    0.06 | 903.925
    0.07 | 1102.96
    0.08 | 1312.56
    0.09 | 1527.69
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  tbl3: Table
    // Bingham fluid area
    Time (s) | Volume fraction of fluid 1 (m^2)
    0 | 0.0803062
    0.01 | 0.0803062
    0.02 | 0.0803062
    0.03 | 0.0803062
    0.04 | 0.0803062
    0.05 | 0.0803062
    0.06 | 0.0803062
    0.07 | 0.0803062
    0.08 | 0.0803062
    0.09 | 0.0803062
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
Plots
  pg1: PlotGroup2D "Velocity (spf)" | data = dset1
    surf1: Surface | expr = spf.U
      filt1: Filter | expr = ls.Vf1>0.5
    arws1: ArrowSurface | expr = {u, v}
  pg2: PlotGroup2D "Pressure (spf)" | data = dset1
    con1: Contour | expr = p; levelrounding = off
      filt1: Filter | expr = ls.Vf1>0.5
  pg3: PlotGroup2D "Volume Fraction of Fluid 1 (ls)" | data = dset1
    surf1: Surface | expr = ls.Vf1
    con1: Contour | expr = ls.Vf1; levelmethod = levels; levels = 0.5
  pg4: PlotGroup2D "Pressure (p)" | data = dset1
    surf1: Surface | expr = p; descr = Pressure
      filt1: Filter | expr = ls.Vf1>0.5
  pg5: PlotGroup2D "Shear rate" | data = dset1
    surf1: Surface | expr = spf.sr; descr = Shear rate
      filt1: Filter | expr = ls.Vf1>0.5
  pg6: PlotGroup2D "Dynamic viscosity" | data = dset1
    surf1: Surface | expr = spf.mu; descr = Dynamic viscosity
      filt1: Filter | expr = ls.Vf1>0.5
  pg7: PlotGroup2D "Yield zone" | data = dset1
    surf1: Surface | expr = yield_index
      filt1: Filter | expr = ls.Vf1>0.5
  pg8: PlotGroup1D "1D Plot Group 8" | data = dset1
    lngr1: LineGraph on boundaries 6 | data = cln1; expr = ls.Vf1; xdata = expr; xdataexpr = t
  pg9: PlotGroup2D "Velocity (spf) 1" | data = dset3
    surf1: Surface | expr = spf.U
      filt1: Filter | expr = ls.Vf1>0.5
  pg10: PlotGroup2D "Pressure (spf) 1" | data = dset3
    con1: Contour | expr = p; levelrounding = off
      filt1: Filter | expr = ls.Vf1>0.5
  pg11: PlotGroup2D "Volume Fraction of Fluid 1 (ls) 1" | data = dset3
    surf1: Surface | expr = ls.Vf1
    con1: Contour | expr = ls.Vf1; levelmethod = levels; levels = 0.5

Exports
  anim1: Animation
    avifilename = C:\Users\ShemrounShop\Desktop\volume fraction.avi
    framesel = all
    maxframes = 151
    size = hd
  data1: Data | data = dset3; expr = ls.Vf1; filename = C:\Users\ShemrounShop\Desktop\2.csv; parameterlayout = manual